// COMSOL Multiphysics 6.4.0.293 model "first-band-temp.mph"
// Outline of the model tree

Selections
  sel1: Explicit on no domains
  sel2: Explicit on domains 2
  sel3: Explicit on domains 2
  sel4: Explicit on boundaries 5, 6, 10, 11
  sel5: Explicit on domains 1
  sel6: Explicit on boundaries 1, 2, 9, 12

Geometry
  geom1 "Geometry 1" (3D, length unit mm)
    cyl1: Cylinder "boru" | r = 50; h = 100
    cyl2: Cylinder "band" | r = 53; h = 100
    fin: Finalize "Form Union"

Materials
  mat1: Common "Copper" on selection sel2
    def: def "Basic"
      relpermeability = 1
      electricconductivity = 5.998e7[S/m]
      heatcapacity = 385[J/(kg*K)]
      relpermittivity = 1
      emissivity = 0.5
      density = 8940[kg/m^3]
      thermalconductivity = 400[W/(m*K)]
      seebeckcoefficient = 6.5e-6
    Enu: Enu "Young's modulus and Poisson's ratio"
      E = 126e9[Pa]
      nu = 0.34
    linzRes: linzRes "Linearized resistivity"
      rho0 = 1.667e-8[ohm*m]
      alpha = 3.862e-3[1/K]
      Tref = 293.15[K]
  mat2: Common "Auri-Band" on selection sel5
    def: def "Basic"
      thermalconductivity = 0.4
      seebeckcoefficient = 120e-6
      electricconductivity = 8810

Physics
  ht: HeatTransfer "Heat Transfer in Solids" on all domains
    dependent variable T
    solid1: SolidHeatTransferModel "Solid 1" (default)
    init1: init "Initial Values 1" (default)
    ins1: ThermalInsulation (default)
    temp1: TemperatureBoundary "copper-pipe" on selection sel4 | T0 = 250[degC]
    hf1: HeatFluxBoundary "Heat Flux 1" on selection sel6
      HeatFluxType = ConvectiveHeatFlux
      h = 50
      Text = 25[degC]
      materialType = nonSolid
  ec: ConductiveMedia "Electric Currents" on all domains
    dependent variable V
    cucns1: CurrentConservationSolid "Current Conservation in Solids 1" (default)
    ein1: ElectricInsulation (default)
    init1: init "Initial Values 1" (default)
    gnd1: Ground on boundaries 3

Multiphysics
  tee1: ThermoelectricEffect on all domains | Heat_physics = ht; EMCurrentDensity_physics = ec
  emh1: ElectromagneticHeating on all domains | EMHeat_physics = ec; Heat_physics = ht

Mesh
  mesh1 "Mesh 1" (physics-controlled)

Studies
  std1 "Study 1"
    stat: Stationary

Solver configurations
  sol1 "Solution 1" (study std1)
    v1: Variables "Dependent Variables 1"
    s1: Stationary "Stationary Solver 1"
      se1: Segregated
        ss1: SegregatedStep "Electric Currents"
        ss2: SegregatedStep "Temperature"
        ll1: LowerLimit
      i1: Iterative
        mg1: Multigrid
      d1: Direct "Direct, heat transfer variables (ht)"

Datasets
  dset1: Solution | solution = sol1

Plots
  pg1: PlotGroup3D "Temperature (ht)" | data = dset1
    vol1: Volume | expr = T
  pg2: PlotGroup3D "Electric Potential (ec)" | data = dset1
    vol1: Volume | expr = V
  pg3: PlotGroup3D "Electric Field (ec)" | data = dset1
    mslc1: Multislice
      expr = ec.normE
      multiplanexmethod = coord
      xcoord = ec.CPx
      multiplaneymethod = coord
      ycoord = ec.CPy
      multiplanezmethod = coord
      zcoord = ec.CPz
    strmsl1: StreamlineMultislice
      expr = {ec.Ex, ec.Ey, ec.Ez}
      multiplanexmethod = coord
      xcoord = ec.CPx
      multiplaneymethod = coord
      ycoord = ec.CPy
      multiplanezmethod = coord
      zcoord = ec.CPz
      tran1: Transparency | transparency = 0.9; expr = T
      filt1: Filter | expr = !isScalingSystemDomain